<?xml version="1.0" ?>
<Node name="lroot" gravity="0 0 0" dt="0.02">
    <RequiredPlugin name="SofaOpenglVisual"/>
    <VisualStyle displayFlags="showInteractionForceFields"/>
    <MeshObjLoader name="LiverSurface" filename="mesh/liver-smooth.obj" />

    <Node name="Liver" >
        <EulerImplicitSolver name="cg_odesolver"   rayleighStiffness="0.1" rayleighMass="0.1" />
        <CGLinearSolver name="linear solver" iterations="25" tolerance="1e-09" threshold="1e-09" />
        <MeshGmshLoader name="meshLoader" filename="mesh/liver.msh" />
        <TetrahedronSetTopologyContainer name="topo" src="@meshLoader" />
        <MechanicalObject name="dofs" src="@meshLoader" />
        <TetrahedronSetGeometryAlgorithms template="Vec3d" name="GeomAlgo" />
        <DiagonalMass  name="computed using mass density" massDensity="1" />
        <TetrahedralCorotationalFEMForceField template="Vec3d" name="FEM" method="large" poissonRatio="0.3" youngModulus="3000" computeGlobalMatrix="0" />
        <FixedConstraint  name="FixedConstraint" indices="3 39 64" />
        <Node name="Visu" tags="Visual" gravity="0 -9.81 0">
            <OglModel  name="VisualModel" src="@../../LiverSurface" />
            <BarycentricMapping name="visual mapping" input="@../dofs" output="@VisualModel" />
        </Node>

        <Node name="Weight" >
            <MechanicalObject template="Vec3d" name="myParticle" rest_position="0 0 0" position="0 0 0" />
            <UniformMass totalMass="30" />
            <PolynomialSpringsForceField polynomialDegree="3" polynomialStiffness="20 10 50" object1='@.' indices1='0' object2='@../dofs' indices2='15' drawMode='0' showIndicesScale="1"/>
        </Node>
    </Node>

</Node>
