<?xml version="1.0"?>
<Node name="root" dt="0.02">
    <CollisionPipeline verbose="1" draw="0" printLog="0"/>
    <BruteForceDetection name="N2" />
    <NewProximityIntersection name="Proximity" alarmDistance="0.3" contactDistance="0.2" />
    <CollisionResponse name="Response" response="default" />


    <Node name="Fixed">
        <MeshObjLoader name="loader" filename="mesh/torus_for_collision.obj" />
        <Mesh src="@loader" />
        <MechanicalObject src="@loader" rx="90" />
        <Triangle simulated="0" moving="0" />
        <OglModel name="Visual" fileMesh="mesh/torus.obj" color="gray" rx="90" />
    </Node>

    <Node name="Chain">

        <include name="FEM" href="Objects/TorusFEM.xml" dx="2.5" />
        <include name="Spring" href="Objects/TorusFEM.xml" dx="5" rx="90" />
        <include name="FFD" href="Objects/TorusFEM.xml" dx="7.5" />
        <include name="TorusRigid" href="Objects/TorusRigid.xml" dx="10" rx="90" />
    </Node>
</Node>
